# Biogas Calculations
# Total Skid Information
Q_entrance := 270*ft^3/min
ch4_conc := 0.614
T_entrance := 86.19 °F
P_entrance := 6.85*249.0889 Pa = 0.247472 psi
ρ_RNG := 0.01495 kg/m^3
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# H2S Calculations
h_H2S := 8 ft
g = 9.80665 m/s^2
ρ_RNG*g*h_H2S = 0.357492 Pa
P_H2Sout := P_entrance + ρ_RNG*g*h_H2S = 0.247524 psi
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# FLT 321 Calculations
P_FLT321out := P_H2Sout
# Heat Exchanger 311 Calculations
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T_new := 46.7 °F = 281.317 K  # TIT 08-810
T_entrance = 303.256 K
# Using Ideal Gas Law (assuming const. volume and density)
P_HX311out := P_FLT321out*T_new/T_entrance = 0.229617 psi
# compare to PIT 08-810 (approx. 12.34 psi)
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# Compressor Calculations
P_incomp := P_HX311out
ω_manf := 1800 rpm
speed_rate := 1.06
ω_skid := ω_manf*speed_rate  # Not sure how to use w
T_outcomp := 197.83 °F = 365.278 K
P_outcomp := P_incomp*T_outcomp/T_new = 0.298148 psi
# Compare to PIT 08-820B
# approx. 193 psi
# FLT 231 Calculations
P_outFLT231 := P_outcomp
# HX342, HX342, and KO Tank Calculations
P_HXloopin := P_outFLT231
T_HXloopout := 78.52 °F = 298.994 K  # TIT 08-833
P_HXloopout := P_HXloopin*T_HXloopout/T_outcomp = 0.244046 psi
# VOC and Siloxane Removal
